// SBML level 2 version 4
// dcterms:bibliographicCitation: urn:miriam:pubmed:32289100

function Rate_Law_for_Susceptible_to_Infected(beta, I, S)
  beta*I*S;
end

model Roda2020___SIR_model_of_COVID_19_spread_in_Wuhan()
  // Roda2020 - SIR model of COVID-19 spread in Wuhan
  // This model was encoded and executed on COPASI 4.28 (Build 226) and reproduces figs 3a, 4c, and 4d from the manuscript.
  // Since the COVID-19 outbreak in Wuhan City in December of 2019, numerous model predictions on the COVID-19 epidemics in Wuhan and other parts of China have been reported. These model predictions have shown a wide range of variations. In our study, we demonstrate that nonidentifiability in model calibrations using the confirmed-case data is the main reason for such wide variations. Using the Akaike Information Criterion (AIC) for model selection, we show that an SIR model performs much better than an SEIR model in representing the information contained in the confirmed-case data. This indicates that predictions using more complex models may not be more reliable compared to using a simpler model. We present our model predictions for the COVID-19 epidemic in Wuhan after the lockdown and quarantine of the city on January 23, 2020. We also report our results of modeling the impacts of the strict quarantine measures undertaken in the city after February 7 on the time course of the epidemic, and modeling the potential of a second outbreak after the return-to-work in the city.
  // isVersionOf DOID:0080600
  // hasProperty mamo:MAMO_0000028
  // hasProperty mamo:MAMO_0000046
  // hasTaxon taxonomy:2697049
  // hasTaxon taxonomy:9606
  // isDescribedBy pubmed:32289100

  // Compartments:
  compartment Wuhan = 1;  // isVersionOf ncit:C16428; isVersionOf ncit:C25632

  // Species:
  species Susceptible in Wuhan = 5999755;  // isVersionOf ncit:C171133; isVersionOf ido:0000514
  // I as per the paper - 245
  // I used - 60
  species Infected in Wuhan = 60;  // isVersionOf ido:0000511; isVersionOf ncit:C171133
  species Recovered in Wuhan = 0;  // isVersionOf ido:0000621; isVersionOf ncit:C171133
  species Confirmed in Wuhan = 0;  // isVersionOf ncit:C171133; isVersionOf ncit:C15220

  // Parameters:
  // 2.09e-7, 1.881e-7, 1.816e-7, 1.463e-7
  beta = 2.09e-7;
  // Rho_o = 0.909
  // Rho_1 = 1.3*0.909 = 1.1817
  // Rho_2 = 1.03
  rho = 0.909;
  mu = 0.1;

  // Reactions:
  Susceptible_to_Infected: Susceptible => Infected; Wuhan*Rate_Law_for_Susceptible_to_Infected(beta, Infected, Susceptible);  // isVersionOf ncit:C171133; isVersionOf ncit:C128320
  Infected_to_Recovered: Infected => Recovered; Wuhan*mu*Infected;  // isVersionOf ncit:C25746; isVersionOf ncit:C171133
  Infected_to_Confirmed: Infected => Confirmed; Wuhan*rho*Infected;  // isVersionOf ncit:C15220; isVersionOf ncit:C171133

  // Unit definitions:
  unit length = metre;
  unit area = metre^2;
  unit volume = 1e-3 litre;
  unit time = 86400 second;
  unit substance = item;
end
